# OpenSim document version 40500
Model CylinderPendulum:
  gravity: 0 -9.8065 0
  credits: HannahSavon
  Ground
  BodySet:
    Body body1: mass=0.1 [kg] mass_center=(0 0.25 0) inertia=(0.002105833 4.5e-5 0.002105833 0 0 0)
      Cylinder body1_geom_1: radius=0.06 half_height=0.25
    Body body2: mass=0.1 mass_center=(0 0.25 0) inertia=(0.002105833 4.5e-5 0.002105833 0 0 0)
      Cylinder body2_geom_1: radius=0.06 half_height=0.25
    Body body3: mass=20 mass_center=(0 0 0) inertia=(0.1333333 0.1333333 0.1333333 0 0 0)
      Brick body3_geom_1: half_lengths=(0.2 0.2 0.2)
  JointSet:
    PinJoint joint1: socket_parent_frame=ground_offset socket_child_frame=body1_offset
      Coordinate angle1: default_value=0.3 range=(-3.14 3.14)
      PhysicalOffsetFrame ground_offset: socket_parent=/ground translation=(0 0 0) [meters]
      PhysicalOffsetFrame body1_offset: socket_parent=/bodyset/body1 translation=(0 0.25 0)
    PinJoint joint2: socket_parent_frame=body1_offset socket_child_frame=body2_offset
      Coordinate angle2: default_value=0.5 range=(-3.14 3.14)
      PhysicalOffsetFrame body1_offset: socket_parent=/bodyset/body1 translation=(0 -0.25 0)
      PhysicalOffsetFrame body2_offset: socket_parent=/bodyset/body2 translation=(0 0.25 0)
    PinJoint joint3: socket_parent_frame=body2_offset socket_child_frame=body3_offset
      Coordinate angle3: default_value=-0.8 range=(-3.14 3.14)
      PhysicalOffsetFrame body2_offset: socket_parent=/bodyset/body2 translation=(0 -0.25 0)
      PhysicalOffsetFrame body3_offset: socket_parent=/bodyset/body3 translation=(0 0 0)
