# OpenSim document version 40500
Model SimplePendulum:
  gravity: 0 -9.8065 0
  Ground
  BodySet:
    Body body1: mass=1 [kg] mass_center=(0 0 0) inertia=(1 1 1 0 0 0)
      Sphere body1_geom_1: radius=0.05
    Body body2: mass=1 mass_center=(0 0 0) inertia=(1 1 1 0 0 0)
      Sphere body2_geom_1: radius=0.05
  JointSet:
    PinJoint joint1: socket_parent_frame=ground_offset socket_child_frame=body1_offset
      Coordinate angle1: default_value=0.1 range=(-3.14 3.14)
      PhysicalOffsetFrame ground_offset: socket_parent=/ground translation=(0 0 0) [meters]
      PhysicalOffsetFrame body1_offset: socket_parent=/bodyset/body1 translation=(0 0 0)
    PinJoint joint2: socket_parent_frame=body1_offset socket_child_frame=body2_offset
      Coordinate angle2: default_value=0.1 range=(-3.14 3.14)
      PhysicalOffsetFrame body1_offset: socket_parent=/bodyset/body1 translation=(0 0 0)
      PhysicalOffsetFrame body2_offset: socket_parent=/bodyset/body2 translation=(0 1 0)
