# OpenSim document version 40500
Model Pendulum:
  gravity: 0 -9.81 0
  Ground
  BodySet:
    Body pendulum: mass=1 [kg] mass_center=(0 0 0) inertia=(1 1 1 0 0 0)
      Sphere pendulum_geom_1: radius=0.05
  JointSet:
    PinJoint pin_joint: socket_parent_frame=ground_offset socket_child_frame=pendulum_offset
      Coordinate angle: default_value=0.1 range=(-3.14 3.14)
      PhysicalOffsetFrame ground_offset: socket_parent=/ground translation=(0 0 0) [meters]
      PhysicalOffsetFrame pendulum_offset: socket_parent=/bodyset/pendulum translation=(0 1 0)
