# OpenSim document version 40500
Model SimpleDoublePendulum:
  gravity: 0 -9.8065 0
  credits: Example Author
  Ground
  BodySet:
    Body firstCylinder: mass=0.1 [kg] mass_center=(0 0.25 0) inertia=(0.1 0.1 0.1 0 0 0)
      Cylinder firstCylinder_geom_1: radius=0.03 half_height=0.25
    Body secondCylinder: mass=0.1 mass_center=(0 0.25 0) inertia=(0.1 0.1 0.1 0 0 0)
      Cylinder secondCylinder_geom_1: radius=0.03 half_height=0.25
  JointSet:
    PinJoint pin1: socket_parent_frame=ground_offset socket_child_frame=firstCylinder_offset
      Coordinate pin1_coord_0
      PhysicalOffsetFrame ground_offset: socket_parent=/ground translation=(0 0 0) [meters]
      PhysicalOffsetFrame firstCylinder_offset: socket_parent=/bodyset/firstCylinder translation=(0 0.25 0)
    PinJoint pin2: socket_parent_frame=firstCylinder_offset socket_child_frame=secondCylinder_offset
      Coordinate pin2_coord_0
      PhysicalOffsetFrame firstCylinder_offset: socket_parent=/bodyset/firstCylinder translation=(0 -0.25 0)
      PhysicalOffsetFrame secondCylinder_offset: socket_parent=/bodyset/secondCylinder translation=(0 0.25 0)
