# OpenSim document version 40000
Model SimpleModel:
  Ground
  BodySet:
    Body: mass=1 [kg] mass_center=(0 0 0) inertia=(1 1 1 0 0 0)
  JointSet:
    PinJoint Joint: socket_parent_frame=ground_offset socket_child_frame=Body_offset
      Coordinate Joint_coord_0
      PhysicalOffsetFrame ground_offset: socket_parent=/ground translation=(0 0 0) [meters]
      PhysicalOffsetFrame Body_offset: socket_parent=/bodyset/Body translation=(0 0 0)
  ForceSet:
    CoordinateActuator Actuator: coordinate=Joint_coord_0 optimal_force=1
  ContactGeometrySet:
    ContactSphere: socket_frame=/bodyset/Body location=(0 0 0) radius=0.1
